// COMSOL Multiphysics 5.5.0.292 model "thermoelectric_generator_55_reset.mph"
// Thermoelectric Leg
// modeldescr_heat/thermoelectric_leg
// This example solves the heat transfer and electric field in an thermoelectric leg. The Peltier effect is used for cooling purposes in this device.
// Outline of the model tree

Parameters
  T0 = 100[degC]  // Input Temperature

Common definitions
  amth_ht: AmbientProperties "Ambient Thermal Properties (ht)" | Ish_amb = 0[W/m^2]

Geometry
  geom1 "Geometry 1" (3D, length unit mm)
    blk1: Block | size = {1, 1, 6}; layername = Layer 1; layer = 0.1; layertop = on
    fin: Finalize "Form Union"

Materials
  mat2: Common "Copper" on domains 1, 3
    def "Basic"
      relpermeability = 1
      electricconductivity = 5.998e7[S/m]
      thermalexpansioncoefficient = 17e-6[1/K]
      heatcapacity = 385[J/(kg*K)]
      relpermittivity = 1
      density = 8960[kg/m^3]
      thermalconductivity = 400[W/(m*K)]
      seebeckcoefficient = 6.5e-6[V/K]
    Enu "Young's modulus and Poisson's ratio"
      youngsmodulus = 110e9[Pa]
      poissonsratio = 0.35
    linzRes "Linearized resistivity"
      rho0 = 1.72e-8[ohm*m]
      alpha = 0.0039[1/K]
      Tref = 298[K]
  mat3: Common "Bismuth Telluride - Bi2Te3.1" on domains 2
    def "Basic"
      heatcapacity = 154.4[J/(kg*K)]
      density = 7740[kg/m^3]
      seebeckcoefficient = S(T)
      electricconductivity = sigma(T)
      thermalconductivity = k(T)
      relpermittivity = 1
      int1: Interpolation "Seebeck coefficient" | funcname = S; table = {{100, 75e-6}, {150, 125e-6}, {200, 170e-6}, {250, 200e-6}, {300, 218e-6}, {350, 225e-6}, {400, 218e-6}}; interp = cubicspline; argunit = K; fununit = V/K
      int2: Interpolation "Thermal conductivity" | funcname = k; table = {{100, 25e-1}, {150, 20e-1}, {200, 15.5e-1}, {250, 13.5e-1}, {300, 12.8e-1}, {350, 13.5e-1}, {400, 17.5e-1}}; interp = cubicspline; argunit = K; fununit = W/m/K
      int3: Interpolation "Electrical conductivity" | funcname = sigma; table = {{100, 1.85e5}, {150, 1.42e5}, {200, 1.0e5}, {250, 0.725e5}, {300, 0.6e5}, {350, 0.55e5}, {400, 0.70e5}}; interp = cubicspline; argunit = K; fununit = S/m

Physics
  ht: HeatTransfer "Heat Transfer in Solids" on all domains
    dependent variable T
    PhysicalModelProperty.BackCompStateT = 0
    ConsistentStabilization.glim = (0.01[K])/ht.helem
    solid1: SolidHeatTransferModel "Solid 1" (default)
    init1: init "Initial Values 1" (default)
    ins1: ThermalInsulation (default)
    temp1: TemperatureBoundary "Temperature 1" on boundaries 10 | T0 = T0
    temp2: TemperatureBoundary "Temperature 2" on boundaries 3 | T0 = 0[degC]
  ec: ConductiveMedia "Electric Currents" on all domains
    dependent variable V
    cucn1: CurrentConservation (default)
    ein1: ElectricInsulation (default)
    init1: init "Initial Values 1" (default)
    gnd1: Ground on boundaries 3
    fp1: FloatingPotential on boundaries 10

Multiphysics
  tee1: ThermoelectricEffect | Heat_physics = ht; EMCurrentDensity_physics = ec
  emh1: ElectromagneticHeating "Electromagnetic Heat Source 1" | EMHeat_physics = ec; Heat_physics = ht

Mesh
  mesh1 "Mesh 1"
    size: MeshSizeDefault | hmax = 0.6; hmin = 0.108; hcurve = 0.6; hnarrow = 0.5; hgrad = 1.5
    swe1: Sweep "Swept 1" on remaining entities | sourceface = boundaries 10

Studies
  std1 "Study 1"
    stat: Stationary | discretization = {ht, physics, ec, physics}

Solver configurations
  sol1 "Solution 1" (study std1)
    v1: Variables "Dependent Variables 1"
    s1: Stationary "Stationary Solver 1"
      se1: Segregated
        ss1: SegregatedStep | segvar = {comp1_V, comp1_ec_fp1_V0_ode}; linsolver = i1
        ss2: SegregatedStep "Temperature T" | segvar = {comp1_T}; linsolver = d1; subdamp = 0.8
        ll1: LowerLimit | lowerlimit = comp1.T 0
      i1: Iterative | linsolver = cg
        mg1: Multigrid | prefun = amg
      d1: Direct | linsolver = pardiso

Datasets
  dset1: Solution | solution = sol1

Derived values
  gev1: EvalGlobal "Global Evaluation 1"
    data = dset1
    table = tbl1
    expr = ec.fp1.V0
    unit = V
    descr = Floating potential

Tables
  tbl1: Table
    // Global Evaluation 1 (ec.fp1.V0)
    Floating potential (V)
    -0.0220698
  tbl2: Table
    // Surface Integration 1 (ec.Jz)
    Current density, z component (mA)
    0.0159386

Plots
  pg1: PlotGroup3D "Temperature (ht)" | data = dset1
    surf1: Surface | expr = T; unit = degC
  pg2: PlotGroup3D "Isothermal Contours (ht)" | data = dset1
    iso1: Isosurface | expr = T; unit = degC
  pg3: PlotGroup3D "Electric Potential (ec)" | data = dset1
    mslc1: Multislice | expr = V; unit = mV; descr = Electric potential